n := 6
i := 0 .. 5
j := 0 .. 5
Шоколадки := [Алёнка, Милка, РиттерСпорт, АльпенГолд, Россия, Воздушный]
Аромат := [
    1, 3, 5, 7, 4, 2;
    1/3, 1, 4, 2, 5, 3;
    1/5, 1/4, 1, 2, 3, 5;
    1/7, 1/2, 1/2, 1, 4, 2;
    1/4, 1/5, 1/3, 1/4, 1, 5;
    1/2, 1/3, 1/5, 1/2, 1/5, 1
]
Калории := [
    1, 4, 5, 3, 7, 6;
    1/4, 1, 3, 5, 7, 6;
    1/5, 1/3, 1, 4, 2, 3;
    1/3, 1/5, 1/4, 1, 5, 7;
    1/7, 1/7, 1/2, 1/5, 1, 4;
    1/6, 1/6, 1/3, 1/7, 1/4, 1
]
Цена := [
    1, 3, 5, 4, 5, 3;
    1/3, 1, 7, 4, 6, 3;
    1/5, 1/7, 1, 5, 5, 7;
    1/4, 1/4, 1/5, 1, 4, 6;
    1/5, 1/6, 1/5, 1/4, 1, 2;
    1/3, 1/3, 1/7, 1/6, 1/2, 1
]
РасходВоды := [
    1, 5, 3, 2, 3, 1;
    1/5, 1, 1/3, 1/3, 1/3, 1/4;
    1/3, 3, 1, 1/2, 1, 1/5;
    1/2, 3, 2, 1, 2, 4;
    1/3, 3, 1, 1/2, 1, 5;
    1, 4, 5, 1/4, 1/5, 1
]
УровеньШума := [
    1, 5, 4, 1, 1/3, 2;
    1/5, 1, 2, 3, 4, 1;
    1/4, 1/2, 1, 3, 4, 1/5;
    1, 1/3, 1/3, 1, 1/3, 1/3;
    3, 1/4, 1/4, 3, 1, 1/4;
    1/2, 1, 5, 3, 4, 1
]
Цена := [
    1, 1/4, 1/2, 1/3, 3, 6;
    4, 1, 6, 7, 2, 1;
    2, 1/6, 1, 2, 1/4, 2;
    3, 1/7, 1/2, 1, 1/3, 1/5;
    1/3, 1/2, 4, 3, 1, 1;
    1/6, 1, 1/2, 5, 1, 1
]
Критерии := [
    1, 1/4, 1/5, 1/5, 1/6, 1/2;
    4, 1, 1/3, 1/2, 1/7, 1/4;
    5, 3, 1, 1/2, 2, 3;
    5, 2, 2, 1, 2, 1;
    6, 7, 1/2, 1/2, 1, 1/7;
    2, 4, 1/3, 1, 7, 1
]
A := [Вкус, Упаковка, Количество_ингридиентов, Аромат, Калории, Цена, Критерии]
W := [0, 0, 0, 0, 0, 0, 0]
k := 0
Ak := A[0, k]
w[i] := nthroot(product(Ak[i, j], j = 0 .. n - 1), n)
sum := sum(w[i], i = 0 .. n - 1)
w0 := w/sum
W[:, k] := w0
a[i] := sum(Ak[j, i], j = 0 .. n - 1)
lambda := sum(w0[i]*a[i], i = 0 .. n - 1)
Ic := (lambda - n)/(3 - 1)
k := 1
Ak := A[0, k]
w[i] := nthroot(product(Ak[i, j], j = 0 .. n - 1), n)
sum := sum(w[i], i = 0 .. n - 1)
w0 := w/sum
W[:, k] := w0
a[i] := sum(Ak[j, i], j = 0 .. n - 1)
lambda := sum(w0[i]*a[i], i = 0 .. n - 1)
Ic := (lambda - n)/(3 - 1)
k := 2
Ak := A[0, k]
w[i] := nthroot(product(Ak[i, j], j = 0 .. n - 1), n)
sum := sum(w[i], i = 0 .. n - 1)
w0 := w/sum
W[:, k] := w0
a[i] := sum(Ak[j, i], j = 0 .. n - 1)
lambda := sum(w0[i]*a[i], i = 0 .. n - 1)
Ic := (lambda - n)/(3 - 1)
k := 3
Ak := A[0, k]
w[i] := nthroot(product(Ak[i, j], j = 0 .. n - 1), n)
sum := sum(w[i], i = 0 .. n - 1)
w0 := w/sum
W[:, k] := w0
a[i] := sum(Ak[j, i], j = 0 .. n - 1)
lambda := sum(w0[i]*a[i], i = 0 .. n - 1)
Ic := (lambda - n)/(3 - 1)
k := 4
Ak := A[0, k]
w[i] := nthroot(product(Ak[i, j], j = 0 .. n - 1), n)
sum := sum(w[i], i = 0 .. n - 1)
w0 := w/sum
W[:, k] := w0
a[i] := sum(Ak[j, i], j = 0 .. n - 1)
lambda := sum(w0[i]*a[i], i = 0 .. n - 1)
Ic := (lambda - n)/(3 - 1)
k := 5
Ak := A[0, k]
w[i] := nthroot(product(Ak[i, j], j = 0 .. n - 1), n)
sum := sum(w[i], i = 0 .. n - 1)
w0 := w/sum
W[:, k] := w0
a[i] := sum(Ak[j, i], j = 0 .. n - 1)
lambda := sum(w0[i]*a[i], i = 0 .. n - 1)
Ic := (lambda - n)/(3 - 1)
k := 6
Ak := A[0, k]
w[i] := nthroot(product(Ak[i, j], j = 0 .. n - 1), n)
sum := sum(w[i], i = 0 .. n - 1)
w0 := w/sum
W[:, k] := w0
a[i] := sum(Ak[j, i], j = 0 .. n - 1)
lambda := sum(w0[i]*a[i], i = 0 .. n - 1)
Ic := (lambda - n)/(3 - 1)
W =  # error: Эта переменная не определена. Проверьте правильность установки обозначения.
W0 := W[:, 0]
# Лжи
# Самсунг
l := 0 .. 5
Wkoef[l] := sum(W0[i]*W[:, l + 1][i], i = 0 .. n - 1)  # Индезит
# Атлант
# Бош
# ХотпоинтАристон
